*Heading
** SENT Composite Specimen (Strict Topology)
*Preprint, echo=NO, model=NO, history=NO, contact=NO
*Part, name=Part-1
*Node
108, 0.000000, 1.392305, 0.0
109, 3.000000, 1.392305, 0.0
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*Element, type=B21
1, 1, 944
2, 1, 945
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*Elset, elset=Set-Core
1, 2, 3, 4, 5, 6
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*Elset, elset=Set-Filler
107, 109, 112, 115, 118, 121
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*Elset, elset=Set_R_0p400
1, 2, 3, 4, 5, 6
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*Beam Section, elset=Set_R_0p400, material=Ti-6Al-4V, section=CIRC
0.400
0.,0.,-1.
*Elset, elset=Set_R_0p150
107, 109, 112, 115, 118, 121
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*Beam Section, elset=Set_R_0p150, material=Ti-6Al-4V, section=CIRC
0.150
0.,0.,-1.
*Nset, nset=Set-Top
1575, 1576, 1577, 1578, 1579, 1580
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*Nset, nset=Set-Bottom
1355, 1356, 1357, 1358, 1359, 1360
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*End Part
**
*Assembly, name=Assembly
*Instance, name=Lattice, part=Part-1
*End Instance
*End Assembly
**
*Material, name=Ti-6Al-4V
*Density
4.43e-09,
*Elastic
110000., 0.31
*Plastic, hardening=JOHNSON COOK
1098., 1092., 0.33, 0.014, 1.1, 1605., 25.
*Damage Initiation, criterion=JOHNSON COOK
-0.09, 0.27, 0.48, 0.014, 3.87, 1605., 25., 1.
*Damage Evolution, type=ENERGY
86.,
**
*Step, name=Load, nlgeom=YES
*Dynamic, Explicit
, 0.05
*Boundary
Lattice.Set-Bottom, 1, 6, 0.0
Lattice.Set-Top, 1, 1, 0.0
Lattice.Set-Top, 3, 6, 0.0
*Boundary, type=VELOCITY
Lattice.Set-Top, 2, 2, 100.0
*Output, field, variable=PRESELECT, number interval=50
*End Step
